integral((lambda*x + c1)/sqrt(1 - (lambda*x + c1)^2), x) → -sqrt(1 - (c1 + lambda*x)^2)/lambda
a := 2
b := 4
f(a) - f(0) → f(2) - f(0)
(-2*b*c - (a^2 + b^2))/(2*a) → -2*c - 5
C2(alpha) := -2 + sqrt(-1 + 1/5*alpha^2)
C1(alpha) := -2*(-2 + sqrt(-1 + 1/5*alpha^2)) - 5
f(x, alpha) := 1/2*((x + (-2*(-2 - sqrt(-1 + 1/5*alpha^2)) - 5))*sqrt(alpha^2 - (x + (-2*(-2 - sqrt(-1 + 1/5*alpha^2)) - 5))^2) + alpha^2*asin((x + (-2*(-2 - sqrt(-1 + 1/5*alpha^2)) - 5))/alpha)) + (-2 - sqrt(-1 + 1/5*alpha^2))*x
f(a, alpha) - f(0, alpha) → alpha^2*asin((2*sqrt(alpha^2/5 - 1) + 1)/alpha)/2 - alpha^2*asin((2*sqrt(alpha^2/5 - 1) - 1)/alpha)/2 - 2*sqrt(alpha^2/5 - 1) - (2*sqrt(alpha^2/5 - 1) - 1)*sqrt(alpha^2 - (2*sqrt(1/5*alpha^2 - 1) - 1)^2)/2 + (2*sqrt(alpha^2/5 - 1) + 1)*sqrt(alpha^2 - (2*sqrt(1/5*alpha^2 - 1) + 1)^2)/2 - 4
a^2*a*b/(a^2 + b^2) = 1.6
alpha^2*asin((function + 2)/alpha)/2 - alpha^2*asin(function/alpha)/2 + (function + 2)*sqrt(alpha^2 - (function + 2)^2)/2 - sqrt(alpha^2 - function^2)*function/2 + 2*function == a^2*a*b/(a^2 + b^2)
alpha^2*asin((2*sqrt(alpha^2/5 - 1) + 1)/alpha)/2 - alpha^2*asin((2*sqrt(alpha^2/5 - 1) - 1)/alpha)/2 - 2*sqrt(alpha^2/5 - 1) - (2*sqrt(alpha^2/5 - 1) - 1)*sqrt(alpha^2 - (2*sqrt(1/5*alpha^2 - 1) - 1)^2)/2 + (2*sqrt(alpha^2/5 - 1) + 1)*sqrt(alpha^2 - (2*sqrt(1/5*alpha^2 - 1) + 1)^2)/2 - 4 == 0
2.26570997003
-1.19415942053 - 0.94326168091i
